<?xml version="1.0"?>
<?xml-stylesheet type="text/xsl" href="http://jsbsim.sourceforge.net/JSBSim.xsl"?>

<fdm_config name="J3Cub" version="2.0" release="ALPHA"
   xmlns:xsi="http://www.w3.org/2001/XMLSchema-instance"
   xsi:noNamespaceSchemaLocation="http://jsbsim.sourceforge.net/JSBSim.xsd">

 <fileheader>
  <author> Erik Hofman using Aeromatic v 3.2.0 </author>
  <filecreationdate> 18 Dec 2015 </filecreationdate>
  <version>$Revision: 1.26 $</version>
  <description> Models a J3Cub. </description>
  <note>
    This model was created using publicly available data, publicly available
    technical reports, textbooks, and guesses. It contains no proprietary or
    restricted data. If this model has been validated at all, it would be
    only to the extent that it seems to "fly right", and that it possibly
    complies with published, publicly known, performance data (maximum speed,
    endurance, etc.). Thus, this model is meant for educational and
    entertainment purposes only.

    This simulation model is not endorsed by the manufacturer.
      </note>
  <reference refID="Du_Y_Thesis_2011" author="Yongliang Du" title="Development of real-time flight control system for low-cost vehicle" date="2011"/>
 </fileheader>

<!--
  File:     J3Cub.xml
  Inputs:
    name:          J3Cub
    type:          light commuter with 1 engines
    stall speed:   33.00kts
    max weight:    1220.00 lb
    length:        22.42 ft
    wing:
     span:         35.25 ft
     area:         178.50 sq-ft
     chord:        5.25 ft
     aspect ratio: 6.94:1
     taper ratio:  1.00:1
     incidence:    2.00 degrees
     dihedral:     5.00 degrees
     sweep:        0.00 degrees

    no. engines:   1
    engine type:   Piston Engine
    engine layout: forward fuselage

    gear type:     taildragger
    steering type: steerable
    retractable?:  no

  Outputs:
    wing loading:  6.83 lb/sq-ft
    payload:       274.44 lbs
    CL-alpha:      5.02 per radian
    CL-0:          0.25
    CL-max:        1.85
    CD-0:          0.02
    K:             0.04
    Mcrit:         0.58

   References:
   * "Development of real-time flight control system for low-cost vehicle"
     Du, Yongliang - Cranfield University, January 2011
     https://dspace.lib.cranfield.ac.uk/handle/1826/8621

   * "USA-35B AIRFOIL (usa35b-il)"
     http://airfoiltools.com/airfoil/details?airfoil=usa35b-il#polars
-->

 <metrics>
   <wingarea  unit="FT2">  178.50 </wingarea>
   <wingspan  unit="FT" >   35.25 </wingspan>
   <wing_incidence>          0.0349 </wing_incidence>
   <chord     unit="FT" >    5.25 </chord>
   <htailarea unit="FT2">   24.50 </htailarea>
   <htailarm  unit="FT" >   13.20 </htailarm>
   <vtailarea  unit="FT2">  10.20 </vtailarea>
   <vtailarm  unit="FT" >   13.40 </vtailarm>
   <location name="AERORP" unit="IN">
     <x>    18.90 </x>
     <y>     0.00 </y>
     <z>     0.00 </z>
   </location>
   <location name="EYEPOINT" unit="IN">
     <x>    30.63 </x>
     <y>     0.00 </y>
     <z>   -11.00 </z>
   </location>
   <location name="VRP" unit="IN">
     <x>    -9.86 </x>
     <y>     0.00 </y>
     <z>    -0.97 </z>
   </location>
 </metrics>

    <mass_balance>
        <ixx unit="SLUG*FT2"> 538.01 </ixx>
        <iyy unit="SLUG*FT2"> 386.81 </iyy>
        <izz unit="SLUG*FT2"> 871.03 </izz>
        <!-- wihtout any rims or tires, default rims and tires 12.5 X 2 = 25 lb-->
        <emptywt unit="LBS" > 760.00 </emptywt>
        <location name="CG" unit="IN">
            <x>    15.75 </x> <!-- ini 13.80 -->
            <y>     0.00 </y>
            <z>   -23.23 </z>
        </location>
        <pointmass name="Back seat">
            <weight unit="LBS"> 180 </weight>
            <location name="POINTMASS" unit="IN">
                <x>  34.00 </x>
                <y>   0.00 </y>
                <z> -34.24 </z>
            </location>
        </pointmass>
        <pointmass name="Front seat">
            <weight unit="LBS"> 0 </weight>
            <location name="POINTMASS" unit="IN">
                <x>   8.31 </x>
                <y>   0.00 </y>
                <z> -38.89 </z>
            </location>
        </pointmass>
        <!-- Gear configurations 0 to 5, pointmass [2] to [9]  and [11] to [14] -->
        <!-- Weight and drag are managed by Systems/bushkit.xml -->
        <pointmass name="Left bush wheel 35 inches">
            <!-- 25 lb -->
            <weight unit="LBS"> 0 </weight>
            <location name="POINTMASS" unit="IN">
                <x>   1.17 </x>
                <y> -35.43 </y>
                <z> -63.32 </z>
            </location>
        </pointmass>
        <pointmass name="Right bush wheel 35 inches">
            <!-- 25 lb -->
            <weight unit="LBS"> 0 </weight>
            <location name="POINTMASS" unit="IN">
                <x>   1.17 </x>
                <y>  35.43 </y>
                <z> -63.32 </z>
            </location>
        </pointmass>
        <pointmass name="Left float">
            <!--  66 lb -->
            <weight unit="LBS"> 0 </weight>
            <location name="POINTMASS" unit="IN">
                <x>   1.17 </x>
                <y> -35.43 </y>
                <z> -63.32 </z>
            </location>
        </pointmass>
        <pointmass name="Right float">
            <!--  66 lb -->
            <weight unit="LBS"> 0 </weight>
            <location name="POINTMASS" unit="IN">
                <x>   1.17 </x>
                <y>  35.43 </y>
                <z> -63.32 </z>
            </location>
        </pointmass>
        <pointmass name="Left amphibious">
            <!--  115 lb Baumann Floats, FAA TSO C-27 Approved -->
            <weight unit="LBS"> 0 </weight>
            <location name="POINTMASS" unit="IN">
                <x>   1.17 </x>
                <y> -35.43 </y>
                <z> -63.32 </z>
            </location>
        </pointmass>
        <pointmass name="Right amphibious">
            <!--  115 lb Baumann Floats, FAA TSO C-27 Approved -->
            <weight unit="LBS"> 0 </weight>
            <location name="POINTMASS" unit="IN">
                <x>   1.17 </x>
                <y>  35.43 </y>
                <z> -63.32 </z>
            </location>
        </pointmass>
        <pointmass name="Left ski">
            <!-- ski, 36 "tire and rim 37 lb -->
            <weight unit="LBS"> 0 </weight>
            <location name="POINTMASS" unit="IN">
                <x>   1.17 </x>
                <y> -35.43 </y>
                <z> -63.32 </z>
            </location>
        </pointmass>
        <pointmass name="Right ski">
            <!-- ski, 36 "tire and rim 37 lb -->
            <weight unit="LBS"> 0 </weight>
            <location name="POINTMASS" unit="IN">
                <x>   1.17 </x>
                <y>  35.43 </y>
                <z> -63.32 </z>
            </location>
        </pointmass>
        <pointmass name="Rear Baggage">
            <description> 195.00 LBS max weight = 195 baggage + 65 fuel + 180 pilot + 760 emptywt = 1200</description>
            <weight unit="LBS"> 0 </weight>
            <location name="POINTMASS" unit="IN">
                <x>    48.21 </x>
                <y>     0.00 </y>
                <z>   -40.87 </z>
            </location>
        </pointmass>
        <pointmass name="Left ski lite">
            <!-- 8 lb -->
            <weight unit="LBS"> 0 </weight>
            <location name="POINTMASS" unit="IN">
                <x>   1.17 </x>
                <y> -35.43 </y>
                <z> -63.32 </z>
            </location>
        </pointmass>
        <pointmass name="Right ski lite">
            <!-- 8 lb -->
            <weight unit="LBS"> 0 </weight>
            <location name="POINTMASS" unit="IN">
                <x>   1.17 </x>
                <y>  35.43 </y>
                <z> -63.32 </z>
            </location>
        </pointmass>
        <pointmass name="Default left wheel">
            <!-- 12.5 lb -->
            <weight unit="LBS"> 0 </weight>
            <location name="POINTMASS" unit="IN">
                <x>   1.17 </x>
                <y> -35.43 </y>
                <z> -63.32 </z>
            </location>
        </pointmass>
        <pointmass name="Defaut right wheel">
            <!-- 12.5 lb -->
            <weight unit="LBS"> 0 </weight>
            <location name="POINTMASS" unit="IN">
                <x>   1.17 </x>
                <y>  35.43 </y>
                <z> -63.32 </z>
            </location>
        </pointmass>
        <pointmass name="Hopper">
        <!-- max 750 lb -->
            <weight unit="LBS"> 0 </weight>
            <location name="POINTMASS" unit="IN">
                <x>  37.44 </x>
                <y>   0.00 </y>
                <z> -38.99 </z>
            </location>
        </pointmass>
        <!-- pointmass 16-17 -->
        <pointmass name="extra weight 95hp">
            <weight unit="LBS"> 0 </weight>
            <location name="POINTMASS" unit="IN">
                <x> -22.54 </x>
                <y>   0.0  </y>
                <z> -27.0  </z>
            </location>
        </pointmass>
        <pointmass name="extra weight 150hp">
            <weight unit="LBS"> 0 </weight>
            <location name="POINTMASS" unit="IN">
                <x> -22.54 </x>
                <y>   0.0  </y>
                <z> -27.0  </z>
            </location>
        </pointmass>
        <!-- pointmass 18-19 -->
        <pointmass name="extra weight front tricycle gear">
            <!-- 20 lb -->
            <weight unit="LBS"> 0 </weight>
            <location name="POINTMASS" unit="IN">
                <x> -39.06 </x>
                <y>   0.0  </y>
                <z> -69.41 </z>
            </location>
        </pointmass>
        <pointmass name="remove weight tail gear">
            <!-- -9 lb -->
            <weight unit="LBS"> 0 </weight>
            <location name="POINTMASS" unit="IN">
                <x> 190.18 </x>
                <y>   0.0  </y>
                <z> -20.76 </z>
            </location>
        </pointmass>
        <!-- pointmass 20-21 move gear weight back 25" for tricycle gear configuration-->
        <pointmass name="Left tricycle wheel 35 inches">
            <!-- 25 lb -->
            <weight unit="LBS"> 0 </weight>
            <location name="POINTMASS" unit="IN">
                <x>  25.30 </x>
                <y> -35.43 </y>
                <z> -63.32 </z>
            </location>
        </pointmass>
        <pointmass name="Right tricycle wheel 35 inches">
            <!-- 25 lb -->
            <weight unit="LBS"> 0 </weight>
            <location name="POINTMASS" unit="IN">
                <x>  25.30 </x>
                <y>  35.43 </y>
                <z> -63.32 </z>
            </location>
        </pointmass>
        <pointmass name="Right Door and window">
            <!-- 11 lb door, 10 lb window = 21 lbs-->
            <weight unit="LBS"> 0 </weight>
            <location name="POINTMASS" unit="IN">
                <x>  16.26 </x>
                <y>  14.17 </y>
                <z> -19.36 </z>
            </location>
        </pointmass>
        <!-- pointmass [23] -->
        <pointmass name="Wing-Ice">
           <weight unit="LBS"> 0 </weight>
            <location name="POINTMASS" unit="IN">
                <x> 8.86 </x>
                <y> 0.0   </y>
                <z> 6.05  </z>
            </location>
        </pointmass>
        <!-- pointmass [24] -->
        <pointmass name="Elevator-Ice">
           <weight unit="LBS"> 0 </weight>
            <location name="POINTMASS" unit="IN">
                <x> 169.89 </x>
                <y>   0.0  </y>
                <z>  -5.96 </z>
            </location>
        </pointmass>
        <!-- pointmass [25] -->
        <pointmass name="Stabilizer-Ice">
           <weight unit="LBS"> 0 </weight>
            <location name="POINTMASS" unit="IN">
                <x> 169.89 </x>
                <y>   0.0  </y>
                <z>   5.88 </z>
            </location>
        </pointmass>
        <!-- pointmass [26] -->
        <pointmass name="Fuselage-Ice">
           <weight unit="LBS"> 0 </weight>
            <location name="POINTMASS" unit="IN">
                <x> -47.35 </x>
                <y>   0.0  </y>
                <z> -23.93 </z>
            </location>
        </pointmass>
        <!-- pointmass [27] -->
        <pointmass name="Windshield-Ice">
           <weight unit="LBS"> 0 </weight>
            <location name="POINTMASS" unit="IN">
                <x> -8.22 </x>
                <y>  0.0  </y>
                <z> -3.64 </z>
            </location>
        </pointmass>
        <!-- pointmass [28] -->
        <pointmass name="Propeller-Ice">
           <weight unit="LBS"> 0 </weight>
            <location name="POINTMASS" unit="IN">
                <x> 39.37 </x>
                <y>  0.0  </y>
                <z>-20.04 </z>
            </location>
        </pointmass>
    </mass_balance>

 <propulsion>

   <engine file="Continental A-65-8">
    <location unit="IN">
      <x> -37.52 </x>
      <y>   0.00 </y>
      <z> -25.96 </z>
    </location>
    <orient unit="DEG">
      <pitch> 0.00 </pitch>
       <roll> 0.00 </roll>
        <yaw> 0.00 </yaw>
    </orient>
    <feed>3</feed> <!-- from collector tank 3 -->
    <thruster file="prop_74in_2f_NACA_15-30deg-65hp">
     <sense> 1 </sense>
     <location unit="IN">
       <x> -54.53 </x>
       <y>   0.00 </y>
       <z> -19.92 </z>
     </location>
     <orient unit="DEG">
        <pitch> 0.00 </pitch>
        <roll>  0.00 </roll>
        <yaw>   0.00 </yaw>
     </orient>
    </thruster>
  </engine>

  <engine file="Continental C90">
    <location unit="IN">
      <x> -38.50 </x>
      <y>   0.00 </y>
      <z> -25.96 </z>
    </location>
    <orient unit="DEG">
        <pitch> 0.00 </pitch>
        <roll>  0.00 </roll>
        <yaw>   0.00 </yaw>
    </orient>
    <feed>3</feed> <!-- from collector tank 3 -->
    <thruster file="prop_74in_2f_NACA_15-30deg-95hp">
     <sense> 1 </sense>
     <location unit="IN">
       <x> -55.62 </x>
       <y>   0.00 </y>
       <z> -20.23 </z>
     </location>
     <orient unit="DEG">
        <pitch> 0.00 </pitch>
        <roll>  0.00 </roll>
        <yaw>   0.00 </yaw>
     </orient>
    </thruster>
  </engine>

  <engine file="Lycoming O-320-A1A-D2H">
    <location unit="IN">
        <x> -38.00 </x>
        <y>   0.00 </y>
        <z> -23.62 </z>
    </location>
    <orient unit="DEG">
        <roll>  0.0 </roll>
        <pitch> 0.0 </pitch>
        <yaw>   0.0 </yaw>
    </orient>
    <feed>3</feed> <!-- from collector tank 3 -->
    <thruster file="prop_75in_2f_NACA_15-30deg-150hp">
        <location unit="IN">
            <x> -56.69 </x>
            <y>   0.00 </y>
            <z> -20.55 </z>
        </location>
        <orient unit="DEG">
            <roll>  0.0 </roll>
            <pitch> 0.0 </pitch>
            <yaw>   0.0 </yaw>
        </orient>
        <sense> 1 </sense>
        <p_factor> 5 </p_factor>
    </thruster>
  </engine>

  <tank type="FUEL">
     <location unit="IN">
       <x> -17.51 </x>
       <y>   0.00 </y>
       <z> -27.09 </z>
     </location>
     <capacity unit="LBS"> 74.19 </capacity>
     <contents unit="LBS"> 65.00 </contents>
     <type>AVGAS</type>
  </tank>
  <tank type="FUEL">
     <location unit="IN">
       <x>  21.93 </x>
       <y> -34.70 </y>
       <z>   0.85 </z>
     </location>
     <capacity unit="LBS"> 108.18 </capacity>
     <contents unit="LBS">  0.00 </contents>
     <type>AVGAS</type>
  </tank>
  <tank type="FUEL">
     <location unit="IN">
       <x> 21.93 </x>
       <y> 34.70 </y>
       <z>  0.85 </z>
     </location>
     <capacity unit="LBS"> 108.18 </capacity>
     <contents unit="LBS">  0.00 </contents>
     <type>AVGAS</type>
  </tank>
  <!-- Collector Tank number 3 -->
  <tank type="FUEL">
     <location unit="IN">
       <x> -17.51 </x>
       <y>   0.00 </y>
       <z> -27.09 </z>
     </location>
     <capacity unit="LBS"> 0.1 </capacity>
     <contents unit="LBS"> 0.0 </contents>
     <type>AVGAS</type>
  </tank>

 </propulsion>

    <ground_reactions>

        <!-- The ski wheels friction would have a
             rolling friction on a hard surface and
             slide or drag on snow -->
        <contact type="BOGEY" name="TAIL">
            <location unit="IN">
                <x> 203.00 </x>
                <y>   0.00 </y>
                <z> -36.20 </z>
            </location>
            <static_friction>  0.60 </static_friction>
            <dynamic_friction> 0.50 </dynamic_friction>
            <rolling_friction> 0.02 </rolling_friction>
            <spring_coeff  unit="LBS/FT">   250.00 </spring_coeff>
            <damping_coeff unit="LBS/FT/SEC"> 150.00 </damping_coeff>
            <steerability> STEERABLE </steerability>
            <max_steer unit="DEG">-10.00</max_steer>
            <brake_group> NONE </brake_group>
            <retractable> 0 </retractable>
        </contact>

        <contact type="BOGEY" name="LEFT_MAIN">
            <location unit="IN">
                <x> -13.00 </x>
                <y> -49.00 </y>
                <z> -78.70 </z>
            </location>
            <static_friction>  0.80 </static_friction>
            <dynamic_friction> 0.50 </dynamic_friction>
            <rolling_friction> 0.02 </rolling_friction>
            <spring_coeff  unit="LBS/FT">     1200.00 </spring_coeff>
            <damping_coeff unit="LBS/FT/SEC">  400.00 </damping_coeff>
            <damping_coeff_rebound unit="LBS/FT/SEC">850</damping_coeff_rebound>
            <max_steer unit="DEG">0</max_steer>
            <brake_group> LEFT </brake_group>
            <retractable> 0 </retractable>
        </contact>

        <contact type="BOGEY" name="RIGHT_MAIN">
            <location unit="IN">
                <x> -13.00 </x>
                <y>  49.00 </y>
                <z> -78.70 </z>
            </location>
            <static_friction>  0.80 </static_friction>
            <dynamic_friction> 0.50 </dynamic_friction>
            <rolling_friction> 0.02 </rolling_friction>
            <spring_coeff  unit="LBS/FT">     1200.00 </spring_coeff>
            <damping_coeff unit="LBS/FT/SEC">  400.00 </damping_coeff>
            <damping_coeff_rebound unit="LBS/FT/SEC">850</damping_coeff_rebound>
            <max_steer unit="DEG">0</max_steer>
            <brake_group> RIGHT </brake_group>
            <retractable> 0 </retractable>
        </contact>

        <!-- contact 3, 4, 5 -->
        <contact type="STRUCTURE" name="TAIL_SKID">
            <location unit="IN">
                <x> 211</x>
                <y> 0 </y>
                <z> 19 </z>
            </location>
            <static_friction> 0.5 </static_friction>
            <dynamic_friction> 0.25 </dynamic_friction>
            <spring_coeff unit="LBS/FT">       2000 </spring_coeff>
            <damping_coeff unit="LBS/FT/SEC">   1000 </damping_coeff>
        </contact>

        <contact type="STRUCTURE" name="LEFT_WING">
            <location unit="IN">
                <x>   22  </x>
                <y> -231.5</y>
                <z>   5  </z>
            </location>
            <static_friction>  1 </static_friction>
            <dynamic_friction> 1 </dynamic_friction>
            <spring_coeff unit="LBS/FT">      500.00 </spring_coeff>
            <damping_coeff unit="LBS/FT/SEC"> 100.00 </damping_coeff>
        </contact>

        <contact type="STRUCTURE" name="RIGHT_WING">
            <location unit="IN">
                <x>   22  </x>
                <y>  231.5</y>
                <z>   5  </z>
            </location>
            <static_friction>  1 </static_friction>
            <dynamic_friction> 1 </dynamic_friction>
            <spring_coeff unit="LBS/FT">      500.00 </spring_coeff>
            <damping_coeff unit="LBS/FT/SEC"> 100.00 </damping_coeff>
        </contact>

        <!-- contact 6, 7, 8 -->
        <contact type="STRUCTURE" name="TAIL_BROKEN_GEAR">
            <location unit="IN">
                <x> 199.90 </x>
                <y>   0.00 </y>
                <z> 0 </z>
            </location>
            <static_friction>  0.9 </static_friction>
            <dynamic_friction> 0.5 </dynamic_friction>
            <spring_coeff unit="LBS/FT">       1830.15 </spring_coeff>
            <damping_coeff unit="LBS/FT/SEC">   366.03 </damping_coeff>
        </contact>
        <contact type="STRUCTURE" name="LEFT_BROKEN_GEAR">
            <location unit="IN">
                <x> -10.65 </x>
                <y> -35.43 </y>
                <z> 0 </z>
            </location>
            <static_friction>  0.8 </static_friction>
            <dynamic_friction> 0.4 </dynamic_friction>
            <spring_coeff unit="LBS/FT">       1830.15 </spring_coeff>
            <damping_coeff unit="LBS/FT/SEC">   366.03 </damping_coeff>
        </contact>
        <contact type="STRUCTURE" name="RIGHT_BROKEN_GEAR">
            <location unit="IN">
                <x> -10.65 </x>
                <y> 35.43 </y>
                <z> 0 </z>
            </location>
            <static_friction>  0.8 </static_friction>
            <dynamic_friction> 0.4 </dynamic_friction>
            <spring_coeff unit="LBS/FT">       1830.15 </spring_coeff>
            <damping_coeff unit="LBS/FT/SEC">   366.03 </damping_coeff>
        </contact>

        <!-- contact 9, 10, 11, 12 -->
        <contact type="STRUCTURE" name="NOSE_TOP">
            <location unit="IN">
                <x> -86 </x>
                <y> 0 </y>
                <z> 0 </z>
            </location>
            <static_friction> 1 </static_friction>
            <dynamic_friction> 1 </dynamic_friction>
            <spring_coeff unit="LBS/FT">       500 </spring_coeff>
            <damping_coeff unit="LBS/FT/SEC">   100 </damping_coeff>
        </contact>
        <contact type="STRUCTURE" name="NOSE">
            <location unit="IN">
                <x> -60 </x>
                <y>   0 </y>
                <z> -37 </z>
            </location>
            <static_friction> 1 </static_friction>
            <dynamic_friction> 1 </dynamic_friction>
            <spring_coeff unit="LBS/FT">       500 </spring_coeff>
            <damping_coeff unit="LBS/FT/SEC">   100 </damping_coeff>
        </contact>
        <contact type="STRUCTURE" name="COCKPIT_TOP">
            <location unit="IN">
                <x> -60 </x>
                <y> 0 </y>
                <z> 5 </z>
            </location>
            <static_friction> 1 </static_friction>
            <dynamic_friction> 1 </dynamic_friction>
            <spring_coeff unit="LBS/FT">       500 </spring_coeff>
            <damping_coeff unit="LBS/FT/SEC">   100 </damping_coeff>
        </contact>
        <contact type="STRUCTURE" name="TOP_VS">
            <location unit="IN">
                <x> 192 </x>
                <y> 0 </y>
                <z> 110 </z>
            </location>
            <static_friction> 1 </static_friction>
            <dynamic_friction> 1 </dynamic_friction>
            <spring_coeff unit="LBS/FT">       500 </spring_coeff>
            <damping_coeff unit="LBS/FT/SEC">   100 </damping_coeff>
        </contact>

        <!-- contact 13, 14, 15, 16, 17, 18 -->
        <contact type="STRUCTURE" name="LFfloat">
            <location unit="IN">
                <x>-78.230</x>
                <y>-56.889</y>
                <z>-20</z>
            </location>
            <static_friction>  0.8 </static_friction>
            <dynamic_friction> 0.2 </dynamic_friction>
            <spring_coeff unit="LBS/FT">       1830.15 </spring_coeff>
            <damping_coeff unit="LBS/FT/SEC">   366.03 </damping_coeff>
        </contact>
        <contact type="STRUCTURE" name="RFfloat">
            <location unit="IN">
                <x>-78.230</x>
                <y>56.889</y>
                <z>-20</z>
            </location>
            <static_friction>  0.8 </static_friction>
            <dynamic_friction> 0.2 </dynamic_friction>
            <spring_coeff unit="LBS/FT">       1830.15 </spring_coeff>
            <damping_coeff unit="LBS/FT/SEC">   366.03 </damping_coeff>
        </contact>
        <contact type="STRUCTURE" name="LMfloat">
            <location unit="IN">
                <x>70.16</x>
                <y>-56.889</y>
                <z>-20</z>
            </location>
            <static_friction>  0.8 </static_friction>
            <dynamic_friction> 0.2 </dynamic_friction>
            <spring_coeff unit="LBS/FT">       1830.15 </spring_coeff>
            <damping_coeff unit="LBS/FT/SEC">   366.03 </damping_coeff>
        </contact>
        <contact type="STRUCTURE" name="RMfloat">
            <location unit="IN">
                <x>70.16</x>
                <y>56.889</y>
                <z>-20</z>
            </location>
            <static_friction>  0.8 </static_friction>
            <dynamic_friction> 0.2 </dynamic_friction>
            <spring_coeff unit="LBS/FT">       1830.15 </spring_coeff>
            <damping_coeff unit="LBS/FT/SEC">   366.03 </damping_coeff>
        </contact>
        <contact type="STRUCTURE" name="LRfloat">
            <location unit="IN">
                <x>160.71</x>
                <y>-56.889</y>
                <z>-20</z>
            </location>
            <static_friction>  0.8 </static_friction>
            <dynamic_friction> 0.2 </dynamic_friction>
            <spring_coeff unit="LBS/FT">       1830.15 </spring_coeff>
            <damping_coeff unit="LBS/FT/SEC">   366.03 </damping_coeff>
        </contact>
        <contact type="STRUCTURE" name="RRfloat">
            <location unit="IN">
                <x>160.71</x>
                <y>56.889</y>
                <z>-20</z>
            </location>
            <static_friction>  0.8 </static_friction>
            <dynamic_friction> 0.2 </dynamic_friction>
            <spring_coeff unit="LBS/FT">       1830.15 </spring_coeff>
            <damping_coeff unit="LBS/FT/SEC">   366.03 </damping_coeff>
        </contact>

        <!-- contact 19, 20, 21, 22 -->
        <contact type="BOGEY" name="LFFloatGear">
            <location unit="IN">
                <x>-78</x>
                <y>-56.889</y>
                <z>0</z>
            </location>
            <static_friction>0.60 </static_friction>
            <dynamic_friction>0.50</dynamic_friction>
            <rolling_friction>0.02</rolling_friction>
            <spring_coeff  unit="LBS/FT">    1000.00 </spring_coeff>
            <damping_coeff unit="LBS/FT/SEC"> 350.00 </damping_coeff>
            <steerability> STEERABLE </steerability>
            <max_steer unit="DEG">360</max_steer>
            <brake_group>NONE</brake_group>
            <retractable>1</retractable>
        </contact>
        <contact type="BOGEY" name="RFFloatGear">
            <location unit="IN">
                <x>-78</x>
                <y>56.889</y>
                <z>0</z>
            </location>
            <static_friction>0.60 </static_friction>
            <dynamic_friction>0.50</dynamic_friction>
            <rolling_friction>0.02</rolling_friction>
             <spring_coeff  unit="LBS/FT">   1000.00 </spring_coeff>
            <damping_coeff unit="LBS/FT/SEC"> 350.00 </damping_coeff>
            <steerability> STEERABLE </steerability>
            <max_steer unit="DEG">360</max_steer>
            <brake_group>NONE</brake_group>
            <retractable>1</retractable>
        </contact>
        <contact type="BOGEY" name="LMFloatGear">
            <location unit="IN">
                <x>76</x>
                <y>-56.889</y>
                <z>0</z>
            </location>
            <static_friction>  0.80</static_friction>
            <dynamic_friction> 0.50 </dynamic_friction>
            <rolling_friction> 0.02 </rolling_friction>
            <spring_coeff  unit="LBS/FT">     1200.00 </spring_coeff>
            <damping_coeff unit="LBS/FT/SEC">  400.00 </damping_coeff>
            <damping_coeff_rebound unit="LBS/FT/SEC">850</damping_coeff_rebound>
            <max_steer unit="DEG">0</max_steer>
            <brake_group>LEFT</brake_group>
            <retractable>1</retractable>
        </contact>
        <contact type="BOGEY" name="RMFloatGear">
            <location unit="IN">
                <x>76</x>
                <y>56.889</y>
                <z>0</z>
            </location>
            <static_friction>  0.80 </static_friction>
            <dynamic_friction> 0.50 </dynamic_friction>
            <rolling_friction> 0.02 </rolling_friction>
            <spring_coeff  unit="LBS/FT">     1200.00 </spring_coeff>
            <damping_coeff unit="LBS/FT/SEC">  400.00 </damping_coeff>
            <damping_coeff_rebound unit="LBS/FT/SEC">850</damping_coeff_rebound>
            <max_steer unit="DEG">0</max_steer>
            <brake_group>RIGHT</brake_group>
            <retractable>1</retractable>
        </contact>

        <!-- contact 23 = 2 wheels on nose ski (c172p) tail ski optional on Cub.
            The ski wheels friction would have a
             rolling friction on a hard surface and
             slide or drag on snow -->
        <!-- contact 23, 24, 25 -->
        <!-- 23 is not used at this time but needed to keep contact positions following it -->
        <contact type="BOGEY" name="TAIL_SKI">
            <location unit="IN">
                <x>  18.44 </x>
                <y> 0 </y>
                <z> 0 </z>
            </location>
            <static_friction> 0.8 </static_friction>
            <dynamic_friction> 0.5 </dynamic_friction>
            <rolling_friction> 0.02 </rolling_friction>
            <spring_coeff unit="LBS/FT"> 1800 </spring_coeff>
            <damping_coeff unit="LBS/FT/SEC"> 600 </damping_coeff>
            <max_steer unit="DEG"> 10 </max_steer>
            <brake_group> NONE </brake_group>
            <retractable>0</retractable>
        </contact>
        <contact type="BOGEY" name="LEFT_SKI">
            <location unit="IN">
                <x> 93 </x>
                <y> -51 </y>
                <z> -10 </z>
            </location>
            <static_friction> 0.8 </static_friction>
            <dynamic_friction> 0.5 </dynamic_friction>
            <rolling_friction> 0.02 </rolling_friction>
            <spring_coeff unit="LBS/FT"> 5400 </spring_coeff>
            <damping_coeff unit="LBS/FT/SEC"> 400 </damping_coeff>
            <max_steer unit="DEG"> 0.0 </max_steer>
            <brake_group> NONE </brake_group>
            <retractable>0</retractable>
        </contact>
        <contact type="BOGEY" name="RIGHT_SKI">
            <location unit="IN">
                <x> 93 </x>
                <y> 52 </y>
                <z> -10 </z>
            </location>
            <static_friction> 0.8 </static_friction>
            <dynamic_friction> 0.5 </dynamic_friction>
            <rolling_friction> 0.02 </rolling_friction>
            <spring_coeff unit="LBS/FT"> 5400 </spring_coeff>
            <damping_coeff unit="LBS/FT/SEC"> 400 </damping_coeff>
            <max_steer unit="DEG"> 0.0 </max_steer>
            <brake_group>NONE </brake_group>
            <retractable>0</retractable>
        </contact>

        <!-- contact 26, 27, 28-->
        <contact type="STRUCTURE" name="LEFT_SKI_LITE">
            <location unit="IN">
                <x> -29.43</x>
                <y> -65   </y>
                <z> -83   </z>
            </location>
            <static_friction> 0.55 </static_friction>
            <dynamic_friction> 0.275 </dynamic_friction>
            <spring_coeff  unit="LBS/FT">     1200.00 </spring_coeff>
            <damping_coeff unit="LBS/FT/SEC">  400.00 </damping_coeff>
        </contact>
        <contact type="STRUCTURE" name="RIGHT_SKI_LITE">
            <location unit="IN">
                <x> -29.33</x>
                <y>  65   </y>
                <z> -82.4 </z>
            </location>
            <static_friction> 0.55 </static_friction>
            <dynamic_friction> 0.275 </dynamic_friction>
            <spring_coeff  unit="LBS/FT">     1200.00 </spring_coeff>
            <damping_coeff unit="LBS/FT/SEC">  400.00 </damping_coeff>
        </contact>
        <contact type="STRUCTURE" name="TAIL_SKI_LITE">
            <location unit="IN">
                <x> 199.90</x>
                <y>   0.00</y>
                <z> -32.5.0 </z>
            </location>
            <static_friction>  0.5 </static_friction>
            <dynamic_friction> 0.249 </dynamic_friction>
            <spring_coeff  unit="LBS/FT">   600.00 </spring_coeff>
            <damping_coeff unit="LBS/FT/SEC"> 300.00 </damping_coeff>
        </contact>

        <!-- bogey 29 - contact 30 -->
        <contact type="BOGEY" name="NOSE_MAIN">
            <location unit="IN">
                <x> -46.98 </x>
                <y>   0.00 </y>
                <z> -81.00 </z>
            </location>
            <static_friction>  0.8  </static_friction>
            <dynamic_friction> 0.5  </dynamic_friction>
            <rolling_friction> 0.02 </rolling_friction>
            <spring_coeff unit="LBS/FT"> 1800 </spring_coeff>
            <damping_coeff unit="LBS/FT/SEC"> 600 </damping_coeff>
            <max_steer unit="DEG"> 10 </max_steer>
            <brake_group> NONE </brake_group>
            <retractable> 0 </retractable>
        </contact>
        <contact type="STRUCTURE" name="NOSE_BROKEN_GEAR">
            <location unit="IN">
                <x>-46.98 </x>
                <y>  0.00 </y>
                <z>  0.00 </z>
            </location>
            <static_friction>  0.8 </static_friction>
            <dynamic_friction> 0.4 </dynamic_friction>
            <spring_coeff unit="LBS/FT">       1830.15 </spring_coeff>
            <damping_coeff unit="LBS/FT/SEC">   366.03 </damping_coeff>
        </contact>

    </ground_reactions>

    <flight_control name="FCS: j3cub">

         <channel name="Landing Gear">
            <!-- Disable gear movement if electrical voltage is too low -->
            <switch name="Gear Command">
                <default value="gear/gear-cmd-norm"/>
                <output>gear/gear-input-norm</output>
                <!-- Route back the (normalized) output of the <kinematic>  to its input in order to disable it. -->
                <test logic="AND" value="gear/gear-pos-norm">
                    /sim/model/pa-18/hydraulics/hydraulic-pump eq 0
                </test>
            </switch>
            <kinematic name="Gr">
                <input>gear/gear-input-norm</input>
                <traverse>
                    <setting>
                        <position>0</position>
                        <time>0 </time>
                    </setting>
                    <setting>
                        <position>1</position>
                        <time>5</time>
                    </setting>
                </traverse>
                <output>gear/gear-pos-norm</output>
            </kinematic>

            <kinematic name="/controls/gear/water-rudder-down">
                <input>/controls/gear/water-rudder</input>
                <traverse>
                    <setting>
                        <position>0</position>
                        <time>0 </time>
                    </setting>
                    <setting>
                        <position>1</position>
                        <time>1</time>
                    </setting>
                </traverse>
            </kinematic>
        </channel>

        <channel name="Flaps">
            <!-- Use to disable flaps if broken -->
            <switch name="Flaps Command">
                <default value="fcs/flap-cmd-norm"/>
                <output>fcs/flap-input-norm</output>

                <!-- Route back the (normalized) output of the <kinematic>
                     to its input in order to disable it.

                <test logic="AND" value="fcs/flap-pos-norm">
                    controls/flight/flaps-broken eq 1
                </test>              -->
            </switch>

            <kinematic name="Flaps Control">
                <input>fcs/flap-input-norm</input>
                <traverse>
                    <setting>
                        <position>0</position>
                        <time>0</time>
                    </setting>
                    <setting>
                        <position>25</position>
                        <time>.5</time>
                    </setting>
                    <setting>
                        <position>50</position>
                        <time>.5</time>
                    </setting>
                </traverse>
                <output>fcs/flap-pos-deg</output>
            </kinematic>

            <aerosurface_scale name="Flap Position Normalizer">
                <input>fcs/flap-pos-deg</input>
                <domain>
                    <min>0</min> <!-- Flaps actual minimum position -->
                    <max>50</max> <!-- Flaps actual maximum position -->
                </domain>
                <range>
                    <min>0</min> <!-- Flaps normalized minimum position -->
                    <max>1</max> <!-- Flaps normalized maximum position -->
                </range>
                <output>fcs/flap-pos-norm</output>
            </aerosurface_scale>

            <kinematic name="Flaps Lever">
                <input>/controls/flight/flaps</input>
                <traverse>
                    <setting>
                        <position>0</position>
                        <time>0</time>
                    </setting>
                    <setting>
                        <position>1</position>
                        <time>.5</time>
                    </setting>
                    <setting>
                        <position>2</position>
                        <time>1</time>
                    </setting>
                </traverse>
                <output>/sim/model/pa-18/cockpit/flaps-lever</output>
            </kinematic>
        </channel>

        <channel name="Mixture">
            <!-- If the engine was primed enough times and throttle
                 is in starter position, then mixture is 1.
            -->
            <fcs_function name="fcs/mixture-primer-cmd">
                <function>
                    <table>
                        <independentVar lookup="row">/controls/engines/engine/primer</independentVar>
                        <independentVar lookup="column">/controls/engines/current-engine/throttle</independentVar>
                        <tableData>
                                 0.09    0.1    0.5    0.51
                            2    0       0      0      0
                            3    0       1      1      0
                            4    0       1      1      0
                            5    0       1      1      0
                            6    0       1      1      0
                            7    0       0      0      0
                        </tableData>
                    </table>
                </function>
            </fcs_function>

            <pure_gain name="fcs/mixture-primer[0]">
                <input>fcs/mixture-cmd-norm[0]</input>
                <gain>fcs/mixture-primer-cmd</gain>
            </pure_gain>

            <pure_gain name="fcs/mixture-primer[1]">
                <input>fcs/mixture-cmd-norm[1]</input>
                <gain>fcs/mixture-primer-cmd</gain>
            </pure_gain>

            <pure_gain name="fcs/mixture-primer[2]">
                <input>fcs/mixture-cmd-norm[2]</input>
                <gain>fcs/mixture-primer-cmd</gain>
            </pure_gain>

            <!-- Primer logic for 65 HP engine -->
            <switch name="Mixture Position 65 HP">
                <default value="fcs/mixture-cmd-norm[0]"/>
                <output>fcs/mixture-pos-norm[0]</output>
                <!-- Use primer if used and engine is cold. If engine
                     is warm, then the mixture lever is used.
                -->
                <test logic="AND" value="fcs/mixture-primer[0]">
                    /controls/engines/engine/use-primer eq 1
                    /engines/engine[0]/oil-temperature-degf le 75
                </test>
            </switch>

            <!-- Primer logic for 95 HP engine -->
            <switch name="Mixture Position 95 HP">
                <default value="fcs/mixture-cmd-norm[1]"/>
                <output>fcs/mixture-pos-norm[1]</output>
                <!-- Use primer if used and engine is cold. If engine
                     is warm, then the mixture lever is used.
                -->
                <test logic="AND" value="fcs/mixture-primer[1]">
                    /controls/engines/engine/use-primer eq 1
                    /engines/engine[1]/oil-temperature-degf le 75
                </test>
            </switch>

            <!-- Primer logic for 160 HP engine -->
            <switch name="Mixture Position 160 HP">
                <default value="fcs/mixture-cmd-norm[2]"/>
                <output>fcs/mixture-pos-norm[2]</output>
                <!-- Use primer if used and engine is cold. If engine
                     is warm, then the mixture lever is used.
                -->
                <test logic="AND" value="fcs/mixture-primer[2]">
                    /controls/engines/engine/use-primer eq 1
                    /engines/engine[1]/oil-temperature-degf le 75
                </test>
            </switch>
        </channel>

        <channel name="Cowl Grill">
            <switch name="cooling-factor-winterkit">
                <!-- winter kit reduces cooling airflow -->
                <default value=".514"/>
                <test logic="AND" value="0.20">
                    /engines/active-engine/winter-kit-installed  EQ  1
                </test>
                <output>/engines/active-engine/cooling-factor-winterkit</output>
            </switch>
            <aerosurface_scale name="icing-nose-air-inlet">
                <!-- ice accumulation in nose inlets reduces cooling airflow -->
                <input>/fdm/jsbsim/ice/fuselage</input> <!-- ice in inches -->
                <gain>1.0</gain>
                <zero_centered>false</zero_centered>
                <domain>
                  <min>0.00</min>
                  <max>0.010</max> <!-- at this inch the max-range is output (thicker ice does not increase effect further) -->
                </domain>
                <range>
                    <!-- reducing factor: 1=no reduction/0=full blocked; min=no-ice, max=full-ice -->
                    <min>1.00</min>
                    <max>0.75</max>
                </range>
                <clipto>
                    <min>0.75</min>
                    <max>1.00</max>
                </clipto>
                <output>/engines/active-engine/cooling-factor-noseicing</output>
            </aerosurface_scale>
            <fcs_function name="engine-cooling-factor">
                <function>
                    <product>
                        <property>/engines/active-engine/cooling-factor-winterkit</property>
                        <property>/engines/active-engine/cooling-factor-noseicing</property>
                    </product>
                </function>
                <clipto>
                    <min>0</min>
                    <max>1</max>
                </clipto>
                <output>/engines/active-engine/cooling-factor</output> <!-- final cooling factor to engine -->
            </fcs_function>
        </channel>

    </flight_control>

 <aerodynamics>

    <property value="0.0">ice/wing</property>

    <function name="aero/function/kCDge">
      <description>Change_in_drag_due_to_ground_effect</description>
          <table>
              <independentVar>aero/h_b-mac-ft</independentVar>
              <tableData>
                  0.0000        0.4800
                  0.1000        0.5150
                  0.1500        0.6290
                  0.2000        0.7090
                  0.3000        0.8150
                  0.4000        0.8820
                  0.5000        0.9280
                  0.6000        0.9620
                  0.7000        0.9880
                  0.8000        1.0000
                  0.9000        1.0000
                  1.0000        1.0000
                  1.1000        1.0000
              </tableData>
          </table>
    </function>

    <function name="aero/function/kCLge">
      <description>Change_in_lift_due_to_ground_effect</description>
          <table>
              <independentVar>aero/h_b-mac-ft</independentVar>
              <tableData>
                  0.0000        1.2030
                  0.1000        1.1270
                  0.1500        1.0900
                  0.2000        1.0730
                  0.3000        1.0460
                  0.4000        1.0550
                  0.5000        1.0190
                  0.6000        1.0130
                  0.7000        1.0080
                  0.8000        1.0060
                  0.9000        1.0030
                  1.0000        1.0020
                  1.1000        1.0000
              </tableData>
          </table>
    </function>

    <function name="aero/function/kClge">
      <description>Change_in_drag_due_to_ground_effect</description>
          <table>
              <independentVar>aero/h_b-mac-ft</independentVar>
              <tableData>
                  0.0000        0.0480
                  0.1000        0.0480
                  0.1500        0.0480
                  0.2000        0.0480
                  0.3000        0.0615
                  0.4000        0.1229
                  0.5000        0.2709
                  0.6000        0.3815
                  0.7000        0.5882
                  0.8000        0.7928
                  0.9000        0.9620
                  1.0000        0.9880
                  1.1000        1.0000
              </tableData>
          </table>
    </function>

    <function name="aero/function/velocity-induced-fps">
        <description> velocity including the propulsion induced velocity.</description>
        <sum>
            <property>velocities/u-aero-fps</property>
            <property>propulsion/engine/prop-induced-velocity_fps</property>
            <property>propulsion/engine[1]/prop-induced-velocity_fps</property>
            <property>propulsion/engine[2]/prop-induced-velocity_fps</property>
        </sum>
    </function>

    <function name="aero/function/qbar-induced-psf">
        <description> q bar including the propulsion induced velocity.</description>
        <product>
            <property>aero/function/velocity-induced-fps</property>
            <property>aero/function/velocity-induced-fps</property>
            <property>atmosphere/rho-slugs_ft3</property>
            <value>0.5</value>
        </product>
    </function>

    <function name="aero/function/total-wing-damage">
        <description>Total damage on wings</description>
        <product>
            <sum>
                <property>wing-damage/left-wing</property>
                <property>wing-damage/right-wing</property>
            </sum>
            <value>0.5</value>
        </product>
    </function>

  <axis name="LIFT">

    <!--taken from SenecaII by Torsten Dreyer-->
    <function name="aero/coefficient/CLicew">
        <description>Lift_decrease_due_to_ice_on_wing</description>
        <product>
            <property>aero/qbar-area</property>
            <table>
                <independentVar>ice/wing</independentVar>
                <tableData>
                    0.0      0
                    0.5      -0.6
                    1.0      -1.2
                    2.0      -2.4
                </tableData>
            </table>
        </product>
    </function>

    <function name="aero/force/Lift_propwash">
      <description>Delta lift due to propeller induced velocity</description>
      <product>
          <property>/engines/active-engine/thrust-coefficient</property>
          <property>aero/function/qbar-induced-psf</property>
          <property>metrics/Sw-sqft</property>
          <property>aero/function/kCLge</property>
          <table>
            <independentVar lookup="row">aero/alpha-rad</independentVar>
            <tableData>
              -0.22  0.000
               0.00  0.068
               0.31  0.313
               0.62  0.000
            </tableData>
          </table>
      </product>
    </function>

    <function name="aero/force/Lift_alpha">
      <description>Wing lift due to alpha</description>
      <product>
          <property>aero/qbar-psf</property>
          <property>metrics/Sw-sqft</property>
          <property>aero/function/kCLge</property>
          <table>

            <!-- USA-35B -->
            <!-- "USA-35B AIRFOIL (usa35b-il)" Xfoil prediction (2D)
            http://airfoiltools.com/airfoil/details?airfoil=usa35b-il#polars -->
            <!-- <independentVar lookup="row">aero/alpha-wing-rad</independentVar>
            <independentVar lookup="column">aero/Re</independentVar>
            <tableData>
                      1668183  3707224
             -1.5700   0.0000   0.0000
             -0.3491  -0.0085  -0.5085
             -0.2443  -0.5085  -0.8136
             -0.1745  -0.5085  -0.5085
             -0.0873   0.1017   0.1017
              0.0000   0.5339   0.5339
              0.0873   1.2204   1.2204
              0.1309   1.4746   1.4746
              0.1745   1.5000   1.6272
              0.2182   1.6201   1.7797
              0.2443   1.6100   1.8300
              0.2618   1.5645   1.8306
              0.2792   1.5100   1.8000
              0.3054   1.4272   1.6500
              0.3491   1.3138   1.4238
              1.5700   0.0000   0.0000
            </tableData> -->

            <!-- USA-35B(2b)-->
            <!-- NACA 331 PDF 9 and 13 and tables p. 30/46 -->
            <!-- https://digital.library.unt.edu/ark:/67531/metadc65986/m2/1/high_res_d/19930091401.pdf -->
            <!-- NACA 352 PDF 24/32  -->
            <!-- https://digital.library.unt.edu/ark:/67531/metadc66005/m2/1/high_res_d/19930091421.pdf -->
            <!-- smoothed / extended +/-1 deg close to stall for twist angle (guessed)-->
            <!-- <independentVar lookup="row">aero/alpha-wing-rad</independentVar>
            <tableData>
               -0.1590     -0.285
               -0.1051     -0.062
               -0.0782      0.044
               -0.0513      0.157
               -0.0244      0.263
                0.0024      0.378
                0.0295      0.488
                0.0564      0.603
                0.1126      0.823
                0.1641      1.045
                0.2176      1.235
                0.2443      1.330
                0.2531      1.360
                0.2709      1.374
                0.2880      1.365
                0.2967      1.350
                0.3229      1.304
                0.3744      1.181
            </tableData> -->

            <!-- USA-35B(2c)-->
            <!-- NACA 331 PDF 9 and 13 and tables p. 30/46 -->
            <!-- https://digital.library.unt.edu/ark:/67531/metadc65986/m2/1/high_res_d/19930091401.pdf -->
            <!-- NACA 352 PDF 24/32  -->
            <!-- https://digital.library.unt.edu/ark:/67531/metadc66005/m2/1/high_res_d/19930091421.pdf -->
            <!-- smoothed / extended +2 deg beyond stall for twist angle (guessed)-->
            <independentVar lookup="row">aero/alpha-wing-rad</independentVar>
            <tableData>
               -0.1590    -0.285
               -0.1051    -0.062
               -0.0782    0.044
               -0.0513    0.157
               -0.0244    0.263
                0.0024    0.378
                0.0295    0.488
                0.0564    0.603
                0.1126    0.823
                0.1641    1.045
                0.2176    1.235
                0.2443    1.330
                0.2709    1.374
                0.2967    1.370
                0.3316    1.350
                0.3578    1.304
                0.4093    1.000

            </tableData>

            <!-- Du Y -->
            <!-- <independentVar lookup="row">aero/alpha-wing-rad</independentVar>
            <tableData>
                -0.0349     -0.0500
                -0.0175     0.0500
                0.0000      0.1250
                0.0349      0.3000
                0.0698      0.5000
                0.1047      0.6800
                0.1396      0.8800
                0.1745      1.1000
                0.2094      1.3000
                0.2443      1.4750
                0.2793      1.6200
                0.3142      1.7250
                0.3316      1.7750
                0.3491      1.8130
                0.3665      1.8000
                0.3840      1.7500
                0.4014      1.6200
                0.4189      1.1750
                0.4363      0.7500
            </tableData> -->

          </table>
          <table>
            <independentVar>aero/function/total-wing-damage</independentVar>
            <tableData>
                  0.0000   1
                  1.0000   0
            </tableData>
          </table>
      </product>
    </function>

    <function name="aero/force/Lift_fuselage">
      <description>Lift due to fuselage incidence</description>
      <!-- thanks to Ysop (from dany93) -->
      <product>
          <property>aero/qbar-psf</property>
          <property>metrics/Sw-sqft</property>
          <property>aero/function/kCLge</property>
          <value>0.15</value> <!-- fuselage area : 0.15 x wing area -->
          <table>
            <!-- NACA 0015-il (XFoil prediction) -->
            <independentVar lookup="row">aero/alpha-rad</independentVar>
            <tableData>
               -0.3447    -1.354
               -0.3141    -1.451
               -0.2618    -1.405
               -0.2182    -1.273
               -0.1745    -1.096
                0.0000    0.000
                0.1745    1.096
                0.2182    1.274
                0.2618    1.407
                0.3054    1.461
                0.3141    1.454
                0.3360    1.397
            </tableData>
          </table>
      </product>
    </function>

    <function name="aero/coefficient/CLDf">
        <description>Delta_lift_due_to_flap_deflection</description>
        <product>
            <property>aero/qbar-psf</property>
            <property>metrics/Sw-sqft</property>
            <property>aero/function/kCLge</property>
            <table>
                <independentVar>fcs/flap-pos-deg</independentVar>
                <tableData>
                    0.0000  0.0000
                    10.0000 0.2000
                    20.0000 0.3000
                    30.0000 0.3500
                    40.0000 0.3750
                    50.0000 0.3875
                </tableData>
            </table>
        </product>
    </function>

    <function name="aero/force/Lift_pitch_rate">
        <description>Lift_due_to_pitch_rate</description>
        <product>
          <property>aero/qbar-psf</property>
          <property>metrics/Sw-sqft</property>
          <property>velocities/q-aero-rad_sec</property>
          <property>aero/ci2vel</property>
          <table>
            <independentVar lookup="row">aero/alpha-rad</independentVar>
            <tableData>         <!-- Du Y -->
             -0.035  8.523602
              0.175  6.996364
            </tableData>
          </table>
        </product>
      </function>

      <function name="aero/force/Lift_alpha_rate">
        <description>Lift_due_to_alpha_rate</description>
        <product>
           <property>aero/qbarUW-psf</property>
           <property>metrics/Sw-sqft</property>
           <property>aero/alphadot-rad_sec</property>
           <property>aero/ci2vel</property>
           <value> 2.3459 </value>  <!-- Du Y -->
        </product>
      </function>

    <function name="aero/force/Lift_elevator">
       <description>Lift due to Elevator Deflection</description>
       <product>
           <property>aero/qbar-psf</property>
           <property>metrics/Sw-sqft</property>
           <property>fcs/elevator-pos-rad</property>
           <!-- value> 0.3274 </value-->    <!-- Du Y -->
               <!-- + 0.01925112 (5.88%) = 0.3466 -->
           <table>
            <independentVar>/sim/model/j3cub/pa-18</independentVar>
            <tableData>
               0   0.3274
               1   0.3467
            </tableData>
          </table>
       </product>
    </function>

    <function name="aero/force/Lift_h_stab">
       <description>Lift due to horizontal stab incidence</description>
       <product>
           <property>aero/qbar-psf</property>
           <property>metrics/Sw-sqft</property>
           <property>aero/alpha-rad</property>
           <value>0.44</value>
       </product>
    </function>

  </axis>

  <axis name="DRAG">

    <!--taken from SenecaII by Torsten Dreyer-->
    <function name="aero/coefficient/CDicew">
        <description>Drag_due_to_ice_on_wing</description>
        <product>
            <property>aero/qbar-area</property>
            <table>
                <independentVar>ice/wing</independentVar>
                <tableData>
                    0.0      0
                    0.5      0.12
                    1.0      0.24
                    2.0      0.6
                </tableData>
            </table>
        </product>
    </function>

    <function name="aero/force/Drag_basic">
       <description>Basic Drag vs alpha</description>
       <product>
          <property>aero/qbar-psf</property>
          <property>metrics/Sw-sqft</property>
          <table>
            <independentVar lookup="row">aero/alpha-rad</independentVar>
            <independentVar lookup="column">aero/Re</independentVar>
            <tableData>         <!-- USA-35B -->
                      1668183  3707224
             -1.5700   1.4091   1.4091
             -0.3491   0.1898   0.1736
             -0.2443   0.1567   0.0494
             -0.1745   0.0307   0.0290
             -0.0873   0.0216   0.0208
              0.0000   0.0189   0.0187
              0.0873   0.0216   0.0208
              0.1309   0.0289   0.0279
              0.1745   0.0332   0.0315
              0.2182   0.0435   0.0402
              0.2618   0.0757   0.0707
              0.3054   0.1408   0.1125
              0.3491   0.1898   0.1736
              0.4000   0.6500   0.6500
              0.5000   0.7000   0.7000
              1.5700   1.4091   1.4091
            </tableData>
          </table>
       </product>
    </function>

    <function name="aero/force/Drag_induced">
       <description>Induced drag</description>
         <product>
           <property>aero/qbar-psf</property>
           <property>metrics/Sw-sqft</property>
           <property>aero/cl-squared</property>
           <property>aero/function/kCDge</property>
           <value> 0.0485 </value>
         </product>
    </function>

    <function name="aero/force/Drag_beta">
       <description>Drag due to sideslip</description>
       <product>
          <property>aero/qbar-psf</property>
          <property>metrics/Sw-sqft</property>
          <table>
            <independentVar lookup="row">aero/beta-rad</independentVar>
            <tableData>
              -1.57    1.2300
              -0.26    0.0500
               0.00    0.0000
               0.26    0.0500
               1.57    1.2300
            </tableData>
          </table>
       </product>
    </function>

    <function name="aero/force/Drag_elevator">
       <description>Drag due to Elevator Deflection</description>
       <product>
           <property>aero/qbar-psf</property>
           <property>metrics/Sw-sqft</property>
           <abs><property>fcs/elevator-pos-rad</property></abs>
           <!-- value> 0.0400 </value-->
               <!-- + 0.002352941 (5.88%) = 0.042352941 -->
           <table>
            <independentVar>/sim/model/j3cub/pa-18</independentVar>
            <tableData>
               0   0.0400
               1   0.0424
            </tableData>
          </table>
       </product>
    </function>

    <function name="aero/coefficient/CDDf">
        <description>Delta_drag_due_to_flap_deflection</description>
        <product>
            <property>aero/qbar-psf</property>
            <property>metrics/Sw-sqft</property>
            <property>aero/function/kCDge</property>
            <table>
                <independentVar>fcs/flap-pos-deg</independentVar>
                <tableData>
                      0.0000    0.0000
                      10.0000   0.0070
                      20.0000   0.0120
                      30.0000   0.0180
                      40.0000   0.0250
                      50.0000   0.0330
                  </tableData>
            </table>
        </product>
    </function>

    <function name="aero/force/Drag_gear">
       <description>Drag due to gear</description>
         <product>
           <property>aero/qbar-psf</property>
           <property>metrics/Sw-sqft</property>
           <value> 0.0040 </value>
           <property>gear/drag-coef[1]</property> <!-- 36 Bush Wheels" -->
           <property>gear/drag-coef[2]</property> <!-- Floats -->
           <property>gear/drag-coef[3]</property> <!-- Amphibious -->
           <property>gear/drag-coef[4]</property> <!-- Ski -->
           <property>gear/drag-coef[5]</property> <!-- Ski Lite -->
           <property>gear/drag-coef[6]</property> <!-- Sprayer -->
           <property>gear/drag-coef[7]</property> <!-- Door Open/Off -->
           <property>gear/drag-coef[8]</property> <!-- Window Open/Off -->
           <property>gear/drag-coef[9]</property> <!-- Amphibious gear extended -->
         </product>
    </function>

  </axis>

  <axis name="SIDE">

    <function name="aero/force/Side_beta">
       <description>Side force due to beta</description>
       <product>
           <property>aero/qbar-psf</property>
           <property>metrics/Sw-sqft</property>
           <property>aero/beta-rad</property>
           <value> -0.1340 </value> <!-- Du Y -->
       </product>
    </function>

    <function name="aero/force/Side_roll_rate">
       <description>Side_force_due_to_roll_rate</description>
       <product>
           <property>aero/qbar-psf</property>
           <property>metrics/Sw-sqft</property>
           <property>aero/bi2vel</property>
           <property>velocities/p-aero-rad_sec</property>
           <table>
            <independentVar lookup="row">aero/Re</independentVar>
            <tableData>         <!-- Du Y -->
              1668183  0.1434
              3707224  0.0022
            </tableData>
          </table>
       </product>
    </function>

    <function name="aero/force/Side_yaw_rate">
       <description>Side_force_due_to_yaw_rate</description>
       <product>
           <property>aero/qbar-psf</property>
           <property>metrics/Sw-sqft</property>
           <property>aero/bi2vel</property>
           <property>velocities/r-aero-rad_sec</property>
           <value> 0.1423 </value>  <!-- Du Y -->
       </product>
    </function>

    <function name="aero/force/Side_rudder">
       <description>Side_force_due_to_rudder</description>
       <product>
           <property>aero/qbar-psf</property>
           <property>metrics/Sw-sqft</property>
           <property>fcs/rudder-pos-rad</property>
           <!--value> 0.0934 </value--> <!-- Du Y -->
           <!-- + 0.00327 (3.5%) = 0.0967 -->
           <table>
            <independentVar>/sim/model/j3cub/pa-18</independentVar>
            <tableData>
               0   0.0934
               1   0.0967
            </tableData>
          </table>
       </product>
    </function>

  </axis>

  <axis name="PITCH">

    <function name="aero/moment/Pitch_propwash">
      <description>Pitch moment due to propeller induced velocity</description>
      <product>
          <property>/engines/active-engine/thrust-coefficient</property>
          <property>aero/function/qbar-induced-psf</property>
          <property>metrics/Sw-sqft</property>
          <property>metrics/bw-ft</property>
          <!--value>0.9</value--> <!-- tune-down value -->
          <table>
            <independentVar lookup="row">aero/alpha-rad</independentVar>
            <tableData>
              -0.01  0.000
               0.00 -0.023
               0.31 -0.108
               0.40  0.000
            </tableData>
          </table>
      </product>
    </function>

    <function name="aero/moment/Pitch_alpha">
       <description>Pitch moment due to alpha</description>
       <product>
           <property>aero/qbar-psf</property>
           <property>metrics/Sw-sqft</property>
           <property>metrics/cbarw-ft</property>
           <property>aero/alpha-rad</property>
           <table>
            <independentVar lookup="row">aero/Re</independentVar>
            <tableData>         <!-- Du Y -->
              1668183  -2.0327
              3707224  -1.3432
            </tableData>
          </table>
          <!-- <value>0.3</value> --> <!-- dany, tests, stiffness issue, 3-point touchdown -->
          <property>tuning/pitch-alpha-fact</property> <!-- dany, tests, 3-point touchdown -->
       </product>
    </function>

    <function name="aero/moment/Pitch_elevator">
        <description>Pitch moment due to elevator</description>
        <product>
          <property>aero/function/qbar-induced-psf</property>
          <property>metrics/Sw-sqft</property>
          <property>metrics/cbarw-ft</property>
          <property>fcs/elevator-pos-rad</property>
          <!--value> -1.2004 </value--> <!-- Du Y -->
          <!-- + −0.07058 (5.88%) = -1.27098 -->
          <!--value> -1.8 </value--> <!-- Du Y --><!--from dany93 -->
          <!-- + -0.10584 (5.88%) = -1.90584 -->
          <table>
            <independentVar>/sim/model/j3cub/pa-18</independentVar>
            <tableData>
              <!--0   -1.2004
              1   -1.2710-->

              0   -1.8
              1   -1.9058

            </tableData>
          </table>
        </product>
    </function>

    <function name="aero/moment/Pitch_damp">
       <description>Pitch moment due to pitch rate</description>
       <product>
           <property>aero/qbar-psf</property>
           <property>metrics/Sw-sqft</property>
           <property>metrics/cbarw-ft</property>
           <property>aero/ci2vel</property>
           <property>velocities/q-aero-rad_sec</property>
           <value> -12.7022 </value>    <!-- Du Y -->
       </product>
    </function>

    <function name="aero/moment/Pitch_alphadot">
       <description>Pitch moment due to alpha rate</description>
       <product>
           <property>aero/qbarUW-psf</property>
           <property>metrics/Sw-sqft</property>
           <property>metrics/cbarw-ft</property>
           <property>aero/ci2vel</property>
           <property>aero/alphadot-rad_sec</property>
           <value> -7.5904 </value>   <!-- Du Y -->
       </product>
    </function>

    <function name="aero/coefficient/Cmdf">
        <description>Delta_pitching_moment_due_to_flap_deflection</description>
        <product>
            <property>aero/qbar-psf</property>
            <property>metrics/Sw-sqft</property>
            <property>metrics/cbarw-ft</property>
            <table>
                <independentVar>fcs/flap-pos-deg</independentVar>
                <tableData>
                    0.0000      0.0000
                    10.0000    -0.0654
                    20.0000    -0.0981
                    30.0000    -0.1140
                    40.0000    -0.1230
                    50.0000    -0.1290
                </tableData>
            </table>
        </product>
    </function>

  </axis>

  <axis name="ROLL">

    <function name="aero/moment/Roll_differential_propwash">
       <description>Roll moment due to differential propwash</description>
       <product>
           <property>/engines/active-engine/thrust-coefficient</property>
           <property>aero/function/qbar-induced-psf</property>
           <property>metrics/Sw-sqft</property>
           <property>metrics/bw-ft</property>
           <property>aero/alpha-rad</property>
           <value> 0.1280 </value>
       </product>
    </function>

    <function name="aero/moment/Roll_beta">
       <description>Roll moment due to beta</description>
       <product>
           <property>aero/qbar-psf</property>
           <property>metrics/Sw-sqft</property>
           <property>metrics/bw-ft</property>
           <property>aero/beta-rad</property>
           <property>aero/function/kClge</property>
           <table>
            <independentVar lookup="row">aero/alpha-rad</independentVar>
            <independentVar lookup="column">aero/Re</independentVar>
            <tableData>         <!-- Du Y -->
                    1128067  1668183   3707224
             -0.035 -0.1024 -0.031363 -0.010147
              0.175 -1.0147 -0.310788 -0.100549
            </tableData>
          </table>
       </product>
    </function>

    <function name="aero/moment/Roll_damp">
       <description>Roll moment due to roll rate</description>
       <product>
           <property>aero/qbar-psf</property>
           <property>metrics/Sw-sqft</property>
           <property>metrics/bw-ft</property>
           <property>aero/bi2vel</property>
           <property>velocities/p-aero-rad_sec</property>
           <value> -0.5250 </value> <!-- Du Y -->
       </product>
    </function>

    <function name="aero/moment/Roll_yaw">
       <description>Roll moment due to yaw rate</description>
       <product>
           <property>aero/qbar-psf</property>
           <property>metrics/Sw-sqft</property>
           <property>metrics/bw-ft</property>
           <property>aero/bi2vel</property>
           <property>velocities/r-aero-rad_sec</property>
           <property>aero/function/kClge</property>
           <table>
            <independentVar lookup="row">aero/alpha-rad</independentVar>
            <independentVar lookup="column">aero/Re</independentVar>
            <tableData>         <!-- Du Y -->
                       557148   1128067    1668183    3707224
             -0.035  0.719318   0.192547   0.071235   0.021888
              0.175  8.422175   2.254452   0.834059   0.256275
            </tableData>
          </table>
       </product>
    </function>

    <function name="aero/moment/Roll_aileron">
       <description>Roll moment due to aileron</description>
       <product>
          <property>aero/qbar-psf</property>
          <property>metrics/Sw-sqft</property>
          <property>metrics/bw-ft</property>
          <property>fcs/left-aileron-pos-rad</property>
          <value> 0.3498 </value>   <!-- Du Y -->
       </product>
    </function>

    <function name="aero/moment/Roll_rudder">
       <description>Roll moment due to rudder</description>
       <product>
           <property>aero/qbar-psf</property>
           <property>metrics/Sw-sqft</property>
           <property>metrics/bw-ft</property>
           <property>fcs/rudder-pos-rad</property>
           <!--value> 0.0133 </value--> <!-- Du Y -->
               <!-- + 0.0004655 (3.5%) = 0.0138 -->
           <table>
            <independentVar>/sim/model/j3cub/pa-18</independentVar>
            <tableData>
               0   0.0133
               1   0.0138
            </tableData>
          </table>
       </product>
    </function>

    <function name="aero/coefficient/Cllwdmg">
        <description>Roll_moment_due_to_damaged_left_wing</description>
        <product>
            <property>aero/qbar-psf</property>
            <property>metrics/Sw-sqft</property>
            <property>metrics/bw-ft</property>
            <property>wing-damage/left-wing</property>
            <value>-0.3</value>
        </product>
    </function>

    <function name="aero/coefficient/Clrwdmg">
        <description>Roll_moment_due_to_damaged_right_wing</description>
        <product>
            <property>aero/qbar-psf</property>
            <property>metrics/Sw-sqft</property>
            <property>metrics/bw-ft</property>
            <property>wing-damage/right-wing</property>
            <value>0.3</value>
        </product>
    </function>

  </axis>

  <axis name="YAW">

    <function name="aero/moment/Yaw_beta">
       <description>Yaw moment due to beta</description>
       <product>
           <property>aero/qbar-psf</property>
           <property>metrics/Sw-sqft</property>
           <property>metrics/bw-ft</property>
           <property>aero/beta-rad</property>
           <value> 0.0602 </value>  <!-- Du Y -->
       </product>
    </function>

    <function name="aero/moment/Yaw_rol_rate">
       <description>Yaw_moment_due_to_roll_rate</description>
       <product>
           <property>aero/qbar-psf</property>
           <property>metrics/Sw-sqft</property>
           <property>metrics/bw-ft</property>
           <property>aero/bi2vel</property>
           <property>velocities/p-rad_sec</property>
           <property>aero/function/kClge</property>
           <table>
            <independentVar lookup="row">aero/Re</independentVar>
            <tableData>         <!-- Du Y -->
               341838  -2.1500
              1128067  -0.1974
              1668183  -0.0531
              3707224  -0.0006
            </tableData>
          </table>
       </product>
    </function>

    <function name="aero/moment/Yaw_damp">
       <description>Yaw moment due to yaw rate</description>
       <product>
           <property>aero/qbar-psf</property>
           <property>metrics/Sw-sqft</property>
           <property>metrics/bw-ft</property>
           <property>aero/bi2vel</property>
           <property>velocities/r-aero-rad_sec</property>
           <value> -0.0810 </value> <!-- Du Y -->
       </product>
    </function>

    <function name="aero/moment/Yaw_rudder">
       <description>Yaw moment due to rudder</description>
       <product>
           <property>aero/function/qbar-induced-psf</property>
           <property>metrics/Sw-sqft</property>
           <property>metrics/bw-ft</property>
           <property>fcs/rudder-pos-rad</property>
           <!--value> -0.0565 </value-->    <!-- Du Y -->
               <!-- + 0.0019775 (3.5%) = -0.0585 -->
           <table>
            <independentVar>/sim/model/j3cub/pa-18</independentVar>
            <tableData>
               0   -0.0565
               1   -0.0585
            </tableData>
          </table>
       </product>
    </function>

    <function name="aero/moment/Yaw_aileron">
       <description>Adverse yaw</description>
       <product>
           <property>aero/qbar-psf</property>
           <property>metrics/Sw-sqft</property>
           <property>metrics/bw-ft</property>
           <property>fcs/left-aileron-pos-rad</property>
           <table>
            <independentVar lookup="row">aero/alpha-rad</independentVar>
            <independentVar lookup="column">aero/Re</independentVar>
            <tableData>                 <!-- Du Y -->
                     1668183    3707224
             -0.035  0.00171    0.00150
              0.175 -0.01890   -0.00173
            </tableData>
          </table>
       </product>
    </function>

  </axis>

 </aerodynamics>

   <external_reactions>

        <force name="hydro-X" frame="LOCAL">
            <location unit="IN">
                <x> 32.6 </x>
                <y> 0 </y>
                <z> 38.5 </z>
            </location>
            <direction>
                <x> 1.0 </x>
                <y> 0.0 </y>
                <z> 0.0 </z>
            </direction>
        </force>
        <force name="hydro-Y" frame="LOCAL">
            <location unit="IN">
                <x> 32.6 </x>
                <y> 0 </y>
                <z> 38.5 </z>
            </location>
            <direction>
                <x> 0.0 </x>
                <y> 1.0 </y>
                <z> 0.0 </z>
            </direction>
        </force>
        <force name="hydro-Z" frame="LOCAL">
            <location unit="IN">
                <x> 32.6 </x>
                <y> 0 </y>
                <z> 38.5 </z>
            </location>
            <direction>
                <x> 0.0 </x>
                <y> 0.0 </y>
                <z>-1.0 </z>
            </direction>
        </force>
        <force name="hydro-pitch[0]" frame="LOCAL">
            <location unit="IN">
                <x> 20.6 </x>
                <y> 0 </y>
                <z> 38.5 </z>
            </location>
            <direction>
                <x> 0.0 </x>
                <y> 0.0 </y>
                <z>-1.0 </z>
            </direction>
        </force>
        <force name="hydro-pitch[1]" frame="LOCAL">
            <location unit="IN">
                <x> 44.6 </x>
                <y> 0 </y>
                <z> 38.5 </z>
            </location>
            <direction>
                <x> 0.0 </x>
                <y> 0.0 </y>
                <z>-1.0 </z>
            </direction>
        </force>
        <force name="hydro-yaw[0]" frame="BODY">
            <location unit="IN">
                <x> 32.6 </x>
                <y>-12.0 </y>
                <z> 38.5 </z>
            </location>
            <direction>
                <x> 1.0 </x>
                <y> 0.0 </y>
                <z> 0.0 </z>
            </direction>
        </force>
        <force name="hydro-yaw[1]" frame="BODY">
            <location unit="IN">
                <x> 32.6 </x>
                <y> 12.0 </y>
                <z> 38.5 </z>
            </location>
            <direction>
                <x> 1.0 </x>
                <y> 0.0 </y>
                <z> 0.0 </z>
            </direction>
        </force>
        <force name="hydro-roll[0]" frame="LOCAL">
            <location unit="IN">
                <x> 32.6 </x>
                <y>-12.0 </y>
                <z> 38.5 </z>
            </location>
            <direction>
                <x> 0.0 </x>
                <y> 0.0 </y>
                <z>-1.0 </z>
            </direction>
        </force>
        <force name="hydro-roll[1]" frame="LOCAL">
            <location unit="IN">
                <x> 32.6 </x>
                <y> 12.0 </y>
                <z> 38.5 </z>
            </location>
            <direction>
                <x> 0.0 </x>
                <y> 0.0 </y>
                <z>-1.0 </z>
            </direction>
        </force>

        <!--
                    Tiedowns use body frame (x positive forward, y positive right, z positive down)
                    -->

        <force name="tiedown-left" frame="BODY">
            <location unit="M">
                <x> 0.1188</x>
                <y>-2.2998</y>
                <z> 0.4008</z>
            </location>
            <direction>
                <x>0.0</x>
                <y>0.0</y>
                <z>1.0</z>
            </direction>
        </force>
        <force name="tiedown-right" frame="BODY">
            <location unit="M">
                <x> 0.1188</x>
                <y> 2.2998</y>
                <z> 0.4008</z>
            </location>
            <direction>
                <x>0.0</x>
                <y>0.0</y>
                <z>1.0</z>
            </direction>
        </force>
        <force name="tiedown-tail" frame="BODY">
            <location unit="M">
                <x> 4.7116</x>
                <y> 0.0000</y>
                <z>-0.6663</z>
            </location>
            <direction>
                <x>0.0</x>
                <y>0.0</y>
                <z>1.0</z>
            </direction>
        </force>

        <force name="mooring-north" frame="LOCAL">
            <location unit="FT">
                <x> 0.0 </x>
                <y> 0.0 </y>
                <z> 0.0 </z>
            </location>
            <direction>
                <x> 1.0 </x>
                <y> 0.0 </y>
                <z> 0.0 </z>
            </direction>
        </force>
        <force name="mooring-east" frame="LOCAL">
            <location unit="FT">
                <x> 0.0 </x>
                <y> 0.0 </y>
                <z> 0.0 </z>
            </location>
            <direction>
                <x> 0.0 </x>
                <y> 1.0 </y>
                <z> 0.0 </z>
            </direction>
        </force>
        <force name="mooring-down" frame="LOCAL">
            <location unit="FT">
                <x> 0.0 </x>
                <y> 0.0 </y>
                <z> 1.0 </z>
            </location>
            <direction>
                <x> 1.0 </x>
                <y> 0.0 </y>
                <z> 0.0 </z>
            </direction>
        </force>

        <force name="aerotow" frame="BODY" unit="LBS">
            <location unit="M">
               <x> 5.125</x>
               <y> 0.001</y>
               <z>-0.525</z>
            </location>
            <direction>
                <x>0.0</x>
                <y>0.0</y>
                <z>0.0</z>
             </direction>
        </force>

        <force name="ai-wake" frame="BODY">
            <location unit="IN">
                <!-- Center of the main wing leading edge -->
                <x>0.076023622047</x>
                <y> 0.0</y>
                <z>1.9068503937</z>
            </location>
            <direction>
                <!-- These are dummy values. They are ignored by FlightGear.
                     Their purpose is to avoid JSBSim display warning messages
                     about <direction> not being specified.
                     -->
                <x>1.0</x>
                <y>0.0</y>
                <z>0.0</z>
            </direction>
        </force>
        <moment name="ai-wake" frame="BODY">
            <direction>
                <!-- These are dummy values. They are ignored by FlightGear.
                     Their purpose is to avoid JSBSim display warning messages
                     about <direction> not being specified.
                     -->
                <x>1.0</x>
                <y>0.0</y>
                <z>0.0</z>
            </direction>
        </moment>

    </external_reactions>

    <system file="Conventional Controls.xml"/>
    <system file="fuel"/>
    <system file="bushkit"/>
    <system file="j3cub-ground-effects"/>
    <system file="j3cub-skis"/>
    <system file="hydrodynamics"/>
    <system file="j3cub-hydrodynamics"/>
    <system file="j3cub-damage"/>
    <system file="j3cub-engine"/>
    <system file="j3cub-heat"/>
    <system file="mooring-jsbsim"/>
    <system file="propulsion"/>
    <system file="indicated-airspeed"/>
    <system file="icing"/>
    <system file="static-sources"/> <!-- integrate alternate static source simulation -->
</fdm_config>
